<?xml version="1.0"?>

<!-- Copyright (c) 2024 Josh Davidson (Octal450) -->

<fdm_config name="737 MAX-8" version="2.0" release="BETA">

	<fileheader>
		<author>Josh Davidson (Octal450)</author>
		<description>737 MAX FDE</description>
	</fileheader>

	<metrics file="FDE/Config/b738m-metrics"/>
	<mass_balance file="FDE/Config/b738m-mass-balance"/>
	<ground_reactions file="FDE/Config/b738m-ground-reactions"/>

	<propulsion>
		<engine file="leap-1b28_1">
			<feed>0</feed>
			<thruster file="direct">
				<location unit="M">
					<x>-2.80069</x>
					<y>-2.62008</y>
					<z>0.53458</z>
				</location>
				<orient unit="DEG">
					<roll>0</roll>
					<pitch>2</pitch>
					<yaw>1</yaw>
				</orient>
			</thruster>
		</engine>

		<engine file="leap-1b28_2">
			<feed>2</feed>
			<thruster file="direct">
				<location unit="M">
					<x>-2.80069</x>
					<y>2.62008</y>
					<z>0.53458</z>
				</location>
				<orient unit="DEG">
					<roll>0</roll>
					<pitch>2</pitch>
					<yaw>-1</yaw>
				</orient>
			</thruster>
		</engine>

		<!-- Positions fudged for CG accuracy -->
		<tank type="FUEL"> <!-- Left Tank -->
			<location unit="M">
				<x>0.29611</x>
				<y>-5.01477</y>
				<z>1.55768</z>
			</location>
			<capacity unit="LBS">8630</capacity>
			<contents unit="LBS">6000</contents>
			<standpipe unit="LBS">31</standpipe>
			<priority>1</priority>
			<type>JET-A1</type>
			<temperature>50</temperature>
		</tank>
		<tank type="FUEL"> <!-- Center Tank -->
			<location unit="M">
				<x>0.29611</x>
				<y>0</y>
				<z>1.55768</z>
			</location>
			<capacity unit="LBS">28803</capacity>
			<contents unit="LBS">0</contents>
			<standpipe unit="LBS">43</standpipe>
			<priority>1</priority>
			<type>JET-A1</type>
			<temperature>50</temperature>
		</tank>
		<tank type="FUEL"> <!-- Right Tank -->
			<location unit="M">
				<x>0.29611</x>
				<y>5.01477</y>
				<z>1.55768</z>
			</location>
			<capacity unit="LBS">8630</capacity>
			<contents unit="LBS">6000</contents>
			<standpipe unit="LBS">31</standpipe>
			<priority>1</priority>
			<type>JET-A1</type>
			<temperature>50</temperature>
		</tank>
		<tank type="FUEL"> <!-- Engine 1 Pipe -->
			<location unit="M">
				<x>0.29611</x>
				<y>0</y>
				<z>1.59159</z>
			</location>
			<capacity unit="LBS">10</capacity>
			<contents unit="LBS">0</contents>
			<priority>1</priority>
			<type>JET-A1</type>
		</tank>
		<tank type="FUEL"> <!-- Engine 2 Pipe -->
			<location unit="M">
				<x>0.29611</x>
				<y>0</y>
				<z>1.59159</z>
			</location>
			<capacity unit="LBS">10</capacity>
			<contents unit="LBS">0</contents>
			<priority>1</priority>
			<type>JET-A1</type>
		</tank>
		<tank type="FUEL"> <!-- APU Pipe -->
			<location unit="M">
				<x>0.29611</x>
				<y>0</y>
				<z>1.59159</z>
			</location>
			<capacity unit="LBS">5</capacity>
			<contents unit="LBS">0</contents>
			<priority>1</priority>
			<type>JET-A1</type>
		</tank>
	</propulsion>

	<system file="b737-libraries"/>
	<system file="b737-fcs"/>

	<flight_control name="none"/>
	<aerodynamics file="FDE/Config/b738m-aerodynamics.xml"/>
	<external_reactions file="FDE/Config/b738m-external-reactions"/>

</fdm_config>
